    AnyDrawVector DrawSupport = {
      AnyRefFrame &ref = .ref1;
      Vec = 0.0005*.Flocal*.ref1.Axes';

      PointAway = Off;
      DrawCoord = Off;

      Line.RGB = {0,0,1};
      Line.Thickness =0.0075;
      Line.End.Thickness = 4*0.0075;
      Line.End.Length = 4*0.0075;
       Line.End.Style=Line3DCapStyleArrow;
   };
